// SBML level 3 version 1

model Gerard_2009_with_DNA_Damage()
  // model units - substance: micromoles, time: hour, extent: micromoles
  // conversionFactor eps

  // Compartments:
  // cell
  compartment Compartment_0 = 1 L;

  // Species:
  species Wee1 in Compartment_0 = 0.1;
  species Ce in Compartment_0 = 0.01;
  species Cd in Compartment_0 = 0.01;
  species Mdp27 in Compartment_0 = 0.01;
  species Cb in Compartment_0 = 0.01;
  species Ca in Compartment_0 = 0.01;
  species pRBp in Compartment_0 = 0.25;
  species AP1 in Compartment_0 = 0.01;
  species pRB in Compartment_0 = 1;
  species Mei in Compartment_0 = 0.01;
  species Mep27 in Compartment_0 = 0.01;
  species Mdi in Compartment_0 = 0.01;
  species E2Fp in Compartment_0 = 0.01;
  species Wee1p in Compartment_0 = 0.01;
  species Mbi in Compartment_0 = 0.01;
  species E2F in Compartment_0 = 0.01;
  species Mai in Compartment_0 = 0.01;
  species pRBc2 in Compartment_0 = 0.05;
  species pRBc1 in Compartment_0 = 0.1;
  species Pei in Compartment_0 = 0.01;
  species Skp2 in Compartment_0 = 0.01;
  species p27 in Compartment_0 = 0.25;
  species Cdc20i in Compartment_0 = 0.01;
  species Cdc20a in Compartment_0 = 0.01;
  species Pe in Compartment_0 = 0.01;
  species Pb in Compartment_0 = 0.01;
  species Pa in Compartment_0 = 0.01;
  species Pbi in Compartment_0 = 0.01;
  species Map27 in Compartment_0 = 0.01;
  species Pai in Compartment_0 = 0.01;
  species Me in Compartment_0 = 0.01;
  species Md in Compartment_0 = 0.01;
  species Mb in Compartment_0 = 0.01;
  species Ma in Compartment_0 = 0.01;
  species p27p in Compartment_0 = 0.01;
  species Mbp27 in Compartment_0 = 0.01;
  species Cdh1i in Compartment_0 = 0.01;
  species Cdh1a in Compartment_0 = 0.01;
  species pRBpp in Compartment_0 = 0.1;
  species GF in Compartment_0 = 0; GF is "Growth factor";
  // Originally reduced thanks to the conservation law : Cd4k + Md + Mdi + Mdp27 = Cdk4_tot So Cdk4 = Cdktot - Md - Mdi - Mdp27 = 1.5-0.03 = 1.47
  species cdk4 in Compartment_0 = 1.47/Compartment_0; cdk4 is "Cdk4-6";
  species cdk2 in Compartment_0 = 1.94/Compartment_0; cdk2 is "Cdk-2";
  species Chk1 in Compartment_0 = 0.01/Compartment_0; Chk1 is "Kinase Chk1";
  species cdk1 in Compartment_0 = 0.47/Compartment_0; cdk1 is "Cdk1 kinase";
  species Md_all in Compartment_0; Md_all is "All actives Cyclin D/Cdk4-6";  // substance in nanomoles
  species ATR in Compartment_0 = 0.01/Compartment_0; ATR is "Kinase ATR";
  species Cdc45 in Compartment_0 = 0.01/Compartment_0; Cdc45 is "DNA anchor factor";
  species Pol in Compartment_0 = 0.01/Compartment_0; Pol is "DNA polymerase alpha";
  species Primer in Compartment_0 = 0.01/Compartment_0; Primer is "RNA Primer";

  // Parameters:
  eps = 17 dimension_less; eps is "Scaling factor used to modify the time scale";
  K_agf = 0.1 micromolar; K_agf is "Michaelis constant for synthesis of AP1 induced by growth factor GF";
  k_dap1 = 0.15 per_hour; k_dap1 is "Apparent first-order rate constant for AP1 transcription factor degradation";
  v_sap1 = 1 micromolar_per_hour; v_sap1 is "Rate of synthesis of the transcription factor AP1 depending on growth factor GF";
  k_de2f = 0.002 per_hour; k_de2f is "Apparent first-order rate constant for non-specific E2F degradation";
  k_de2fp = 1.1 per_hour; k_de2fp is "Apparent first-order rate constant for E2Fp degradation";
  k_dprb = 0.01 per_hour; k_dprb is "Apparent first-order rate constant for pRB degradation";
  k_dprbp = 0.06 per_hour; k_dprbp is "Apparent first-order rate constant for pRBp degradation";
  k_dprbpp = 0.04 per_hour; k_dprbpp is "Apparent first-order rate constant for pRBpp degradation";
  k_pc1 = 0.05 per_micromolar_per_hour; k_pc1 is "Bimolecular rate constant for binding of pRB to E2F";
  k_pc2 = 0.5 per_hour; k_pc2 is "Rate constant for dissociation of complex between pRB and E2F";
  k_pc3 = 0.025 per_micromolar_per_hour; k_pc3 is "Bimolecular rate constant for binding of pRBp to E2F";
  k_pc4 = 0.5 per_hour; k_pc4 is "Rate constant for dissociation of complex between pRBp and E2F";
  K_1 = 0.1 micromolar; K_1 is "Michaelis constant for pRB phosphorylation";
  K_2 = 0.1 micromolar; K_2 is "Michaelis constant for pRBp dephosphorylation";
  K_3 = 0.1 micromolar; K_3 is "Michaelis constant for pRBp phosphorylation";
  K_4 = 0.1 micromolar; K_4 is "Michaelis constant for pRBpp dephosphorylation";
  V_1 = 2.2 per_hour; V_1 is "Rate constant for phosphorylation of pRB";
  V_2 = 2 micromolar_per_hour; V_2 is "Maximum rate of dephosphorylation of pRBp";
  V_3 = 1 per_hour; V_3 is "Rate constant for phosphorylation of pRBp";
  V_4 = 2 micromolar_per_hour; V_4 is "Maximum rate of dephosphorylation of pRBpp";
  K_1e2f = 5 micromolar; K_1e2f is "Michaelis constant for E2F phosphorylation by cyclin A/Cdk2";
  K_2e2f = 5 micromolar; K_2e2f is "Michaelis constant for E2F dephosphorylation";
  V_1e2f = 4 per_hour; V_1e2f is "Rate constant for phosphorylation of E2F by cyclin A/Cdk2";
  V_2e2f = 0.75 micromolar_per_hour; V_2e2f is "Maximum rate of dephosphorylation of E2F";
  v_se2f = 0.15 micromolar_per_hour; v_se2f is "Basal rate of synthesis of E2F";
  v_sprb = 0.8 micromolar_per_hour; v_sprb is "Basal rate of synthesis of pRB";
  Cdk4_tot = 1.5 micromolar; Cdk4_tot is "Total concentration of the Cdk4-6 kinase";
  K_i7 = 0.1 micromolar; K_i7 is "Constant of inhibition by pRB of cyclin D synthesis";
  K_i8 = 2 micromolar; K_i8 is "Constant of inhibition by pRBp of cyclin D synthesis";
  k_cd1 = 0.4 per_hour; k_cd1 is "Rate constant for cyclin D synthesis induced by AP1";
  k_cd2 = 0.005 per_hour; k_cd2 is "Rate constant for cyclin D synthesis induced by E2F";
  k_decom1 = 0.1 per_hour; k_decom1 is "Rate constant for dissociation of complex between cyclin D and Cdk4-6";
  k_com1 = 0.175 per_micromolar_per_hour; k_com1 is "Bimolecular rate constant for binding of cyclin D to Cdk4-6";
  k_c1 = 0.15 per_micromolar_per_hour; k_c1 is "Bimolecular rate constant for binding of cyclin D/Cdk4-6 to p27";
  k_c2 = 0.05 per_hour; k_c2 is "Rate constant for dissociation of complex between cyclin D/Cdk4-6 and p27";
  k_ddd = 0.005 per_hour; k_ddd is "Apparent first-order rate constant for non-specific cyclin D protein degradation";
  K_dd = 0.1 micromolar; K_dd is "Michaelis constant for cyclin D degradation";
  K_1d = 0.1 micromolar; K_1d is "Michaelis constant for cyclin D/Cdk4-6 (i) activation";
  K_2d = 0.1 micromolar; K_2d is "Michaelis constant for cyclin D/Cdk4-6 (a) inactivation";
  V_dd = 5 micromolar_per_hour; V_dd is "Maximum rate of degradation of cyclin D";
  V_m1d = 1 micromolar_per_hour; V_m1d is "Maximum rate of activation of cyclin D/Cdk4-6 (i)";
  V_m2d = 0.2 micromolar_per_hour; V_m2d is "Maximum rate of inactivation of cyclin D/Cdk4-6 (a)";
  a_e = 0.25 micromolar; a_e is "Factor measuring the contribution of Polo-like kinase 3 (Plk3) to phosphorylation and activation of Cdc25 phosphatase (Pei)";
  Cdk2_tot = 2 micromolar; Cdk2_tot is "Total concentration of the Cdk2 kinase";
  i_b1 = 0.5 micromolar; i_b1 is "Factor measuring the contribution of kinase Myt1 to phosphorylation and inhibition of cyclin E/Cdk2";
  K_i9 = 0.1 micromolar; K_i9 is "Constant of inhibition by pRB of cyclin E synthesis";
  K_i10 = 2 micromolar; K_i10 is "Constant of inhibition by pRBp of cyclin E synthesis";
  k_ce = 0.24 per_hour; k_ce is "Rate constant for cyclin E synthesis induced by E2F";
  k_c3 = 0.2 per_micromolar_per_hour; k_c3 is "Bimolecular rate constant for binding of cyclin E/Cdk2 to p27";
  k_c4 = 0.1 per_hour; k_c4 is "Rate constant for dissociation of complex between cyclin E/Cdk2 and p27";
  k_decom2 = 0.1 per_hour; k_decom2 is "Rate constant for dissociation of complex between cyclin E and Cdk2";
  k_com2 = 0.2 per_micromolar_per_hour; k_com2 is "Bimolecular rate constant for binding of cyclin E to Cdk2";
  k_dde = 0.005 per_hour; k_dde is "Apparent first-order rate constant for non-specific cyclin E degradation";
  k_ddskp2 = 0.005 per_hour; k_ddskp2 is "Apparent first-order rate constant for non-specific Skp2 degradation";
  k_dpe = 0.075 per_hour; k_dpe is "Apparent first-order rate constant for degradation of active Cdc25 phosphatase (Pe)";
  k_dpei = 0.15 per_hour; k_dpei is "Apparent first-order rate constant for degradation of inactive Cdc25 phosphatase (Pei)";
  K_de = 0.1 micromolar; K_de is "Michaelis constant for cyclin E degradation";
  K_dceskp2 = 2 micromolar; K_dceskp2 is "Michaelis constant for activation by Skp2 of cyclin E degradation";
  K_dskp2 = 0.5 micromolar; K_dskp2 is "Michaelis constant for Skp2 degradation";
  K_cdh1 = 0.4 micromolar; K_cdh1 is "Michaelis constant for activation by Cdh1 of Skp2 degradation";
  K_1e = 0.1 micromolar; K_1e is "Michaelis constant for cyclin E/Cdk2 (i) activation through dephosphorylation by phosphatase Cdc25 (Pe)";
  K_2e = 0.1 micromolar; K_2e is "Michaelis constant for cyclin E/Cdk2 (a) inactivation through phosphorylation by kinases Wee1 and Myt1";
  K_5e = 0.1 micromolar; K_5e is "Michaelis constant for Cdc25 (Pei) activation through phosphorylation by cyclin E/Cdk2 and Plk3";
  K_6e = 0.1 micromolar; K_6e is "Michaelis constant for Cdc25 (Pe) inactivation";
  V_de = 3 micromolar_per_hour; V_de is "Maximum rate of cyclin E degradation";
  // Written as umol.liter-1.h-1 in the paper Should be h-1 only ?
  V_dskp2 = 1.1 micromolar_per_hour; V_dskp2 is "Maximum rate of Skp2 degradation";
  V_m1e = 2 per_hour; V_m1e is "Rate constant for activation of cyclin E/Cdk2 (i) through dephosphorylation by phosphatase Cdc25 (Pe)";
  V_m2e = 1.4 per_hour; V_m2e is "Rate constant for inactivation of cyclin E/Cdk2 (a) through phosphorylation by kinases Wee1 and Myt1";
  V_m5e = 5 per_hour; V_m5e is "Rate constant for activation of phosphatase Cdc25 through phosphorylation by cyclin E/Cdk2 and Polo-like kinase 3";
  V_6e = 0.8 micromolar_per_hour; V_6e is "Maximum rate of inactivation of phosphatase Cdc25 through phosphorylation";
  v_spei = 0.13 micromolar_per_hour; v_spei is "Rate of synthesis of phosphatase Cdc25 acting on cyclin E/Cdk2";
  v_sspk2 = 0.15 micromolar_per_hour; v_sspk2 is "Maximum rate of synthesis of Skp2";
  x_e1 = 1 dimension_less; x_e1 is "Factor measuring basal, Chk1-independent contribution to the rate of inactivation through phosphorylation of Cdc25 phosphatase (Pe)";
  x_e2 = 1 per_micromolar; x_e2 is "Factor measuring Chk1-dependent contribution to the rate of inactivation through phosphorylation of phosphatase Cdc25 (Pe)";
  a_a = 0.2 micromolar; a_a is "Factor measuring the contribution of Polo-like kinase 3 (Plk3) to phosphorylation and activation of Cdc25 phosphatase (Pa)";
  i_b2 = 0.5 micromolar; i_b2 is "Factor measuring the contribution of kinase Myt1 to phosphorylation and inhibition of cyclin A/Cdk2";
  K_i11 = 0.1 micromolar; K_i11 is "Constant of inhibition by pRB of cyclin A synthesis";
  K_i12 = 2 micromolar; K_i12 is "Constant of inhibition by pRBp of cyclin A synthesis";
  K_i13 = 0.1 micromolar; K_i13 is "Constant of inhibition by pRB of p27 synthesis";
  K_i14 = 2 micromolar; K_i14 is "Constant of inhibition by pRBp of p27 synthesis";
  k_ca = 0.0375 per_hour; k_ca is "Rate constant for cyclin A synthesis induced by E2F";
  k_decom3 = 0.1 per_hour; k_decom3 is "Rate constant for dissociation of complex between cyclin A and Cdk2";
  k_com3 = 0.2 per_micromolar_per_hour; k_com3 is "Bimolecular rate constant for binding of cyclin A to Cdk2";
  k_c5 = 0.15 per_micromolar_per_hour; k_c5 is "Bimolecular rate constant for binding of active cyclin A/Cdk2 to p27";
  k_c6 = 0.125 per_hour; k_c6 is "Rate constant for dissociation of complex between cyclin A/Cdk2 and p27";
  k_dda = 0.005 per_hour; k_dda is "Apparent first-order rate constant for non-specific cyclin A degradation";
  k_ddp27 = 0.06 per_hour; k_ddp27 is "Apparent first-order rate constant for non-specific p27 degradation";
  k_ddp27p = 0.01 per_hour; k_ddp27p is "Apparent first-order rate constant for non-specific p27p degradation";
  k_dcdh1a = 0.1 per_hour; k_dcdh1a is "Apparent first-order rate constant for degradation of active Cdh1";
  k_dcdh1i = 0.2 per_hour; k_dcdh1i is "Apparent first-order rate constant for degradation of inactive Cdh1";
  k_dpa = 0.075 per_hour; k_dpa is "Apparent first-order rate constant for degradation of active phosphatase Cdc25 (Pa)";
  k_dpai = 0.15 per_hour; k_dpai is "Apparent first-order rate constant for degradation of inactive phosphatase Cdc25 (Pai)";
  K_da = 1.1 micromolar; K_da is "Michaelis constant for cyclin A degradation";
  K_dp27p = 0.1 micromolar; K_dp27p is "Michaelis constant for p27p degradation";
  K_dp27skp2 = 0.1 micromolar; K_dp27skp2 is "Michaelis constant for activation by Skp2 of p27p degradation";
  K_acdc20 = 2 micromolar; K_acdc20 is "Michaelis constant for activation by Cdc20 of cyclin A degradation";
  K_1a = 0.1 micromolar; K_1a is "Michaelis constant for cyclin A/Cdk2 (i) activation through dephosphorylation by Cdc25 (Pa)";
  K_2a = 0.1 micromolar; K_2a is "Michaelis constant for cyclin A/Cdk2 (a) inactivation through phosphorylation by kinases Wee1 and Myt1";
  K_1cdh1 = 0.01 micromolar; K_1cdh1 is "Michaelis constant for Cdh1 (i) activation through dephosphorylation";
  K_2cdh1 = 0.01 micromolar; K_2cdh1 is "Michaelis constant for Cdh1 (a) inactivation through phosphorylation by cyclin A/Cdk2 and cyclin B/Cdk1";
  K_5a = 0.1 micromolar; K_5a is "Michaelis constant for Cdc25 (Pai) activation through phosphorylation by cyclin A/Cdk2 and kinase Plk3";
  K_6a = 0.1 micromolar; K_6a is "Michaelis constant for Cdc25 (Pa) inactivation";
  K_1p27 = 0.5 micromolar; K_1p27 is "Michaelis constant for p27 phosphorylation by cyclin E/Cdk2";
  K_2p27 = 0.5 micromolar; K_2p27 is "Michaelis constant of p27p dephosphorylation";
  V_dp27p = 5 micromolar_per_hour; V_dp27p is "Maximum rate of p27p degradation";
  V_da = 2.5 micromolar_per_hour; V_da is "Maximum rate of cyclin A degradation";
  V_m1a = 2 per_hour; V_m1a is "Rate constant for activation of cyclin A/Cdk2 (i) through dephosphorylation by phosphatase Cdc25 (Pa)";
  V_m2a = 1.85 per_hour; V_m2a is "Rate constant for inactivation of cyclin A/Cdk2 (a) through phosphorylation by kinases Wee1 and Myt1";
  V_m5a = 4 per_hour; V_m5a is "Rate constant for activation of phosphatase Cdc25 (Pai) through phosphorylation by cyclin A/Cdk2 and kinase Plk3";
  V_6a = 1 micromolar_per_hour; V_6a is "Maximum rate of phosphatase Cdc25 (Pa) inactivation";
  v_scdh1a = 0.11 micromolar_per_hour; v_scdh1a is "Rate of synthesis of active Cdh1";
  v_spai = 0.105 micromolar_per_hour; v_spai is "Rate of synthesis of phosphatase Cdc25 (Pai) acting on cyclin A/Cdk2";
  v_s1p27 = 0.8 micromolar_per_hour; v_s1p27 is "Basal, E2F-independent rate of synthesis of p27";
  v_s2p27 = 0.1 per_hour; v_s2p27 is "Rate constant for synthesis of p27 induced by E2F";
  V_1cdh1 = 1.25 micromolar_per_hour; V_1cdh1 is "Maximum activation rate of Cdh1 (i) through dephosphorylation";
  V_2cdh1 = 8 per_hour; V_2cdh1 is "Rate constant for inactivation of Cdh1 (a) through phosphorylation by cyclin A/Cdk2 and cyclin B/Cdk1";
  V_1p27 = 100 per_hour; V_1p27 is "Rate constant for inactivation of p27 through phosphorylation by cyclin E/Cdk2";
  V_2p27 = 0.1 micromolar_per_hour; V_2p27 is "Maximum rate of activation of p27p through dephosphorylation";
  x_a1 = 1 dimension_less; x_a1 is "Factor measuring basal, Chk1-independent contribution to the inactivation rate of phosphatase Cdc25 (Pa)";
  x_a2 = 1 per_micromolar; x_a2 is "Factor measuring Chk1-dependent contribution to the inactivation rate of phosphatase Cdc25 (Pa)";
  a_b = 0.11 micromolar; a_b is "Factor measuring the contribution of Polo-like kinase 1 (Plk1) to phosphorylation and activation of Cdc25 phosphatase (Pbi)";
  cdk1_tot = 0.5 micromolar; cdk1_tot is "Total concentration of the Cdk1 kinase";
  i_b = 0.75 micromolar; i_b is "Factor measuring the contribution of kinase(s) other than Cdk1 to phosphorylation and inactivation of kinase Wee1";
  i_b3 = 0.5 micromolar; i_b3 is "Factor measuring the contribution of kinase Myt1 to phosphorylation and inhibition of cyclin B/Cdk1";
  k_c7 = 0.12 per_micromolar_per_hour; k_c7 is "Bimolecular rate constant for binding of cyclin B/Cdk1 (a) to p27";
  k_c8 = 0.2 per_hour; k_c8 is "Rate constant for dissociation of complex between cyclin B/Cdk1 and p27";
  k_decom4 = 0.1 per_hour; k_decom4 is "Rate constant for dissociation of complex between cyclin B and Cdk1";
  k_com4 = 0.25 per_micromolar_per_hour; k_com4 is "Bimolecular rate constant for binding of cyclin B to Cdk1";
  k_dcdc20a = 0.05 per_hour; k_dcdc20a is "Apparent first-order rate constant for degradation of active Cdc20";
  k_dcdc20i = 0.14 per_hour; k_dcdc20i is "Apparent first-order rate constant for degradation of inactive Cdc20";
  k_ddb = 0.005 per_hour; k_ddb is "Apparent first-order rate constant for non-specific cyclin B degradation";
  k_dpb = 0.1 per_hour; k_dpb is "Apparent first-order rate constant for degradation of active phosphatase Cdc25 (Pb)";
  k_dpbi = 0.2 per_hour; k_dpbi is "Apparent first-order rate constant for degradation of inactive phosphatase Cdc25 (Pbi)";
  k_dwee1 = 0.1 per_hour; k_dwee1 is "Apparent first-order rate constant for degradation of active kinase Wee1";
  k_dwee1p = 0.2 per_hour; k_dwee1p is "Apparent first-order rate constant for degradation of inactive kinase Wee1";
  K_db = 0.005 micromolar; K_db is "Michaelis constant for cyclin B degradation";
  K_dbcdc20 = 0.2 micromolar; K_dbcdc20 is "Michaelis constant for activation by Cdc20 (a) of cyclin B degradation";
  K_dbcdh1 = 0.1 micromolar; K_dbcdh1 is "Michaelis constant for activation by Cdh1 (a) of cyclin B degradation";
  K_1b = 0.1 micromolar; K_1b is "Michaelis constant for cyclin B/Cdk1 (i) activation through dephosphorylation by phosphatase Cdc25 (Pb)";
  K_2b = 0.1 micromolar; K_2b is "Michaelis constant for cyclin B/Cdk1 (a) inactivation through phosphorylation by kinases Wee1 and Myt1";
  K_3b = 0.1 micromolar; K_3b is "Michaelis constant for Cdc20 (i) activation through phosphorylation by cyclin B/Cdk1";
  K_4b = 0.1 micromolar; K_4b is "Michaelis constant for Cdc20 (a) inactivation through dephosphorylation";
  K_5b = 0.1 micromolar; K_5b is "Michaelis constant for Cdc25 (Pbi) activation through phosphorylation by cyclin B/Cdk1 and kinase Plk1";
  K_6b = 0.1 micromolar; K_6b is "Michaelis constant for Cdc25 (Pb) inactivation";
  K_7b = 0.1 micromolar; K_7b is "Michaelis constant for Wee1 inactivation through phosphorylation by cyclin B/Cdk1 and kinase Plk1";
  K_8b = 0.1 micromolar; K_8b is "Michaelis constant for Wee1 activation through dephosphorylation";
  v_cb = 0.05 micromolar_per_hour; v_cb is "Rate of synthesis of cyclin B";
  V_db = 0.06 micromolar_per_hour; V_db is "Maximum rate of cyclin B degradation";
  V_m1b = 3.9 per_hour; V_m1b is "Rate constant for activation of cyclin B/Cdk1 (i) through dephosphorylation by phosphatase Cdc25 (Pb)";
  V_m2b = 2.1 per_hour; V_m2b is "Rate constant for inactivation of cyclin B/Cdk1 (a) through phosphorylation by kinases Wee1 and Myt1";
  v_scdc20i = 0.1 micromolar_per_hour; v_scdc20i is "Rate of synthesis of Cdc20 (i)";
  V_m3b = 8 per_hour; V_m3b is "Rate constant for activation of Cdc20 (i) through phosphorylation by cyclin B/Cdk1";
  V_m4b = 0.7 micromolar_per_hour; V_m4b is "Maximum rate of Cdc20 (a) inactivation through dephosphorylation";
  V_m5b = 5 per_hour; V_m5b is "Rate constant for activation of phosphatase Cdc25 (Pbi) through phosphorylation by cyclin B/Cdk1 and kinase Plk1";
  V_6b = 1 micromolar_per_hour; V_6b is "Maximum inactivation rate of phosphatase Cdc25 (Pb)";
  V_m7b = 1.2 per_hour; V_m7b is "Rate constant for inactivation of kinase Wee1 through phosphorylation by cyclin B/Cdk1 and kinase Plk1";
  V_m8b = 1 micromolar_per_hour; V_m8b is "Maximum rate of kinase Wee1 activation through dephosphorylation";
  v_spbi = 0.12 micromolar_per_hour; v_spbi is "Rate of synthesis of phosphatase Cdc25 (Pbi) acting on cyclin B/Cdk1";
  v_swee1 = 0.06 micromolar_per_hour; v_swee1 is "Rate of synthesis of kinase Wee1 independent from coupling to the circadian clock";
  x_b1 = 1 dimension_less; x_b1 is "Factor measuring basal, Chk1-independent contribution to the rate of phosphatase Cdc25 (Pb) inactivation";
  x_b2 = 1 per_micromolar; x_b2 is "Factor measuring Chk1-dependent contribution to the rate of phosphatase Cdc25 (Pb) inactivation through phosphorylation";
  ATR_tot = 0.5 micromolar; ATR_tot is "Total concentration of kinase ATR";
  Chk1_tot = 0.5 micromolar; Chk1_tot is "Total concentration of kinase Chk1";
  Cdc45_tot = 0.5 micromolar; Cdc45_tot is "Total concentration of DNA anchor factor Cdc45";
  // 0.022 in the paper
  k_aatr = 0.022 per_micromolar_per_hour; k_aatr is "Bimolecular rate constant for binding of ATR to RNA primer, resulting in ATR activation";
  k_datr = 0.15 per_hour; k_datr is "Rate constant for dissociation of complex between ATR and RNA primer";
  k_dpol = 0.2 per_hour; k_dpol is "Rate constant for dissociation of complex between DNA polymerase alpha and Cdc45";
  k_dprim = 0.15 per_hour; k_dprim is "Apparent first-order rate constant for RNA primer degradation";
  k_spol = 0.8 per_micromolar_per_hour; k_spol is "Bimolecular rate constant for binding of DNA polymerase alpha (Pol) to Cdc45 resulting in DNA polymerase alpha activation";
  k_sprim = 0.05 per_hour; k_sprim is "Apparent first-order rate constant for RNA primer synthesis catalyzed by DNA polymerase alpha";
  K_1cdc45 = 0.02 micromolar; K_1cdc45 is "Michaelis constant for Cdc45 activation through phosphorylation by cyclin E/Cdk2";
  K_2cdc45 = 0.02 micromolar; K_2cdc45 is "Michaelis constant for Cdc45 inactivation through dephosphorylation";
  K_1chk = 0.5 micromolar; K_1chk is "Michaelis constant for Chk1 activation through phosphorylation by kinase ATR";
  K_2chk = 0.5 micromolar; K_2chk is "Michaelis constant of Chk1 inactivation through dephosphorylation";
  Pol_tot = 0.5 micromolar; Pol_tot is "Total concentration of DNA polymerase alpha";
  V_1cdc45 = 0.8 per_hour; V_1cdc45 is "Rate constant for activation of Cdc45 through phosphorylation by cyclin E/Cdk2";
  V_2cdc45 = 0.12 micromolar_per_hour; V_2cdc45 is "Maximum rate of Cdc45 inactivation through dephosphorylation";
  V_1chk = 4 per_hour; V_1chk is "Rate constant for activation of Chk1 through phosphorylation by kinase ATR";
  V_2chk = 0.1 micromolar_per_hour; V_2chk is "Maximum rate of Chk1 inactivation through dephosphorylation";

  // Assignment rules:
  Md_all := Md + Mdp27;

  // Rate rules:
  Cdc45' = eps*(V_1cdc45*Me*(Cdc45_tot + (-Cdc45))/(K_1cdc45 + Cdc45_tot + (-Cdc45)) + (-(V_2cdc45*Cdc45/(K_2cdc45 + Cdc45))) + (-(k_spol*(Pol_tot + (-Pol))*Cdc45)) + k_dpol*Pol);
  Pol' = eps*(k_spol*(Pol_tot + (-Pol))*Cdc45 + (-(k_dpol*Pol)));
  Primer' = eps*(k_sprim*Pol + (-(k_dprim*Primer)) + (-(k_aatr*(ATR_tot + (-ATR))*Primer)) + k_datr*ATR);
  ATR' = eps*(k_aatr*(ATR_tot + (-ATR))*Primer + (-(k_datr*ATR)));
  Chk1' = eps*(V_1chk*ATR*(Chk1_tot + (-Chk1))/(K_1chk + Chk1_tot + (-Chk1)) + (-(V_2chk*Chk1/(K_2chk + Chk1))));

  // Reactions:
  AP1_constitutive_degradation: AP1 => ; AP1*Compartment_0*k_dap1;
  AP1_stimulation_by_growth_factor: => AP1; GF*Compartment_0*v_sap1/(K_agf + GF);  // modifiers: GF
  Basal_synthesis_of_pRB: => pRB; Compartment_0*v_sprb;
  Constitutive_degradation_of_pRB: pRB => ; pRB*Compartment_0*k_dprb;
  Constitutive_degradation_of_pRBp: pRBp => ; pRBp*Compartment_0*k_dprbp;
  Constitutive_degradation_of_pRBpp: pRBpp => ; pRBpp*Compartment_0*k_dprbpp;
  pRB_E2F_complexification: pRB + E2F -> pRBc1; Compartment_0*(-pRBc1*k_pc2 + k_pc1*E2F*pRB); pRB_E2F_complexification is "pRB-E2F complexification";
  pRBp_E2F_complexification: pRBp + E2F -> pRBc2; Compartment_0*(-pRBc2*k_pc4 + pRBp*E2F*k_pc3); pRBp_E2F_complexification is "pRBp-E2F complexification";
  Phosphorylation_of_pRB_by_Active_complex_cyclin_DCdk4_6: pRB => pRBp; V_1*Md*pRB*Compartment_0/(K_1 + pRB); Phosphorylation_of_pRB_by_Active_complex_cyclin_DCdk4_6 is "Phosphorylation of pRB by Active complex cyclin D/Cdk4-6";  // modifiers: Md
  Phosphorylation_of_pRB_by_Complex_cyclin_DCdk4_6p27: pRB => pRBp; V_1*Mdp27*pRB*Compartment_0/(K_1 + pRB); Phosphorylation_of_pRB_by_Complex_cyclin_DCdk4_6p27 is "Phosphorylation of pRB by Complex cyclin D/Cdk4-6/p27";  // modifiers: Mdp27
  Dephosphorylation_of_pRBp_: pRBp => pRB; V_2*pRBp*Compartment_0/(K_2 + pRBp);
  Phosphorylation_of_pRBp_by_Active_complex_cyclin_ECdk2: pRBp => pRBpp; V_3*Me*pRBp*Compartment_0/(K_3 + pRBp); Phosphorylation_of_pRBp_by_Active_complex_cyclin_ECdk2 is "Phosphorylation of pRBp by Active complex cyclin E/Cdk2";  // modifiers: Me
  Dephosphorylation_of_pRBpp: pRBpp => pRBp; V_4*pRBpp*Compartment_0/(K_4 + pRBpp);
  Basal_synthesis_of_E2F: => E2F; Compartment_0*v_se2f;
  Constitutive_degradation_of_E2F: E2F => ; E2F*Compartment_0*k_de2f;
  Constitutive_degradation_of_E2Fp: E2Fp => ; E2Fp*Compartment_0*k_de2fp;
  E2F_phosphorylation_by_cyclin_ACdk2: E2F => E2Fp; V_1e2f*E2F*Ma*Compartment_0/(K_1e2f + E2F); E2F_phosphorylation_by_cyclin_ACdk2 is "E2F phosphorylation by cyclin A/Cdk2";  // modifiers: Ma
  E2F_dephosphorylation: E2Fp => E2F; V_2e2f*E2Fp*Compartment_0/(K_2e2f + E2Fp);
  Cyclin_D_synthesis_induced_by_AP1: => Cd; Compartment_0*AP1*k_cd1;  // modifiers: AP1
  non_specific_cyclin_D_protein_degradation: Cd => ; Cd*Compartment_0*k_ddd; non_specific_cyclin_D_protein_degradation is "non-specific cyclin D protein degradation";
  Degradation_of_cyclin_D: Cd => ; V_dd*Cd*Compartment_0/(K_dd + Cd);
  Cyclin_DCdk4_6_complexification: Cd + cdk4 -> Mdi; Compartment_0*(-Mdi*k_decom1 + k_com1*Cd*cdk4); Cyclin_DCdk4_6_complexification is "Cyclin D/Cdk4-6 complexification";
  cyclin_D_synthesis_induced_by_E2F: => Cd; k_cd2*Compartment_0*(K_i8/(K_i8 + pRBp))*E2F*(K_i7/(K_i7 + pRB));  // modifiers: E2F, pRB, pRBp
  Activation_of_cyclin_DCdk4_6: Mdi => Md; V_m1d*Mdi*Compartment_0/(K_1d + Mdi); Activation_of_cyclin_DCdk4_6 is "Activation of cyclin D/Cdk4-6";
  Inactivation_of_cyclin_DCdk4_6: Md => Mdi; V_m2d*Md*Compartment_0/(K_2d + Md); Inactivation_of_cyclin_DCdk4_6 is "Inactivation of cyclin D/Cdk4-6";
  Cyclin_DCdk4_6__p27_complexification: Md + p27 -> Mdp27; Compartment_0*(-Mdp27*k_c2 + k_c1*p27*Md); Cyclin_DCdk4_6__p27_complexification is "Cyclin D/Cdk4-6 / p27 complexification";
  Cyclin_E_synthesis_induced_by_E2F: => Ce; k_ce*Compartment_0*(K_i9/(K_i9 + pRB))*E2F*(K_i10/(K_i10 + pRBp));  // modifiers: E2F, pRB, pRBp
  Cyclin_ECdk2_complexification: cdk2 + Ce -> Mei; Compartment_0*(k_com2*cdk2*Ce + (-(k_decom2*Mei))); Cyclin_ECdk2_complexification is "Cyclin E/Cdk2 complexification";
  Cyclin_E_constitutive_degradation: Ce => ; Ce*Compartment_0*k_dde;
  Cyclin_E_degradation_by_Skp2: Ce => ; V_de*Ce*Skp2*Compartment_0/((K_dceskp2 + Skp2)*(K_de + Ce));  // modifiers: Skp2
  Inactivation_of_cyclin_ECdk2_a_through_phosphorylation_by_kinases_Wee1_and_Myt1: Me => Mei; V_m2e*Me*Compartment_0*(Wee1 + i_b1)/(K_2e + Me); Inactivation_of_cyclin_ECdk2_a_through_phosphorylation_by_kinases_Wee1_and_Myt1 is "Inactivation of cyclin E/Cdk2 (a) through phosphorylation by kinases Wee1 and Myt1";  // modifiers: Wee1
  Activation_of_cyclin_ECdk2_i_through_dephosphorylation_by_phosphatase_Cdc25_Pe: Mei => Me; V_m1e*Pe*Mei*Compartment_0/(K_1e + Mei); Activation_of_cyclin_ECdk2_i_through_dephosphorylation_by_phosphatase_Cdc25_Pe is "Activation of cyclin E/Cdk2 (i) through dephosphorylation by phosphatase Cdc25 (Pe)";  // modifiers: Pe
  Cyclin_ECdk2_p27_complexification: Me + p27 -> Mep27; Compartment_0*(k_c3*Me*p27 + (-(k_c4*Mep27))); Cyclin_ECdk2_p27_complexification is "Cyclin E/Cdk2 /p27 complexification";
  Synthesis_of_Skp2: => Skp2; Compartment_0*v_sspk2;
  Constitutive_degradation_of_Skp2: Skp2 => ; Skp2*Compartment_0*k_ddskp2;
  Skp2_degradation_by_Cdh1a: Skp2 => ; V_dskp2*Skp2*Cdh1a*Compartment_0/((K_cdh1 + Cdh1a)*(K_dskp2 + Skp2));  // modifiers: Cdh1a
  Synthesis_of_phosphatase_Cdc25_acting_on_cyclin_ECdk2: => Pei; Compartment_0*v_spei; Synthesis_of_phosphatase_Cdc25_acting_on_cyclin_ECdk2 is "Synthesis of phosphatase Cdc25 acting on cyclin E/Cdk2";
  Degradation_of_inactive_Cdc25_phosphatase_Pei: Pei => ; Pei*Compartment_0*k_dpei; Degradation_of_inactive_Cdc25_phosphatase_Pei is "Degradation of inactive Cdc25 phosphatase (Pei)";
  Chk1_independent_inactivation_through_phosphorylation_of_Cdc25_phosphatase_Pe: Pe => Pei; V_6e*Pe*Compartment_0*x_e1/(K_6e + Pe); Chk1_independent_inactivation_through_phosphorylation_of_Cdc25_phosphatase_Pe is "Chk1-independent inactivation through phosphorylation of Cdc25 phosphatase (Pe)";
  Chk1_dependent_inactivation_through_phosphorylation_of_phosphatase_Cdc25_Pe: Pe => Pei; V_6e*Pe*Chk1*Compartment_0*x_e2/(K_6e + Pe); Chk1_dependent_inactivation_through_phosphorylation_of_phosphatase_Cdc25_Pe is "Chk1-dependent inactivation through phosphorylation of phosphatase Cdc25 (Pe)";  // modifiers: Chk1
  Activation_of_phosphatase_Cdc25_through_phosphorylation_by_cyclin_ECdk2: Pei => Pe; V_m5e*Pei*Me*Compartment_0/(K_5e + Pei); Activation_of_phosphatase_Cdc25_through_phosphorylation_by_cyclin_ECdk2 is "Activation of phosphatase Cdc25 through phosphorylation by cyclin E/Cdk2";  // modifiers: Me
  Activation_of_phosphatase_Cdc25_through_phosphorylation_by_Polo_like_kinase_3: Pei => Pe; V_m5e*Pei*a_e*Compartment_0/(K_5e + Pei); Activation_of_phosphatase_Cdc25_through_phosphorylation_by_Polo_like_kinase_3 is "Activation of phosphatase Cdc25 through phosphorylation by Polo-like kinase 3";
  Constitutive_degradation_of_active_Cdc25_phosphatase_Pe: Pe => ; Pe*Compartment_0*k_dpe; Constitutive_degradation_of_active_Cdc25_phosphatase_Pe is "Constitutive degradation of active Cdc25 phosphatase (Pe)";
  Cyclin_A_synthesis_induced_by_E2F: => Ca; E2F*(K_i11/(K_i11 + pRB))*(K_i12/(K_i12 + pRBp))*Compartment_0*k_ca;  // modifiers: E2F, pRB, pRBp
  Cyclin_ACdk2_complexification: cdk2 + Ca -> Mai; Compartment_0*(-Mai*k_decom3 + cdk2*Ca*k_com3); Cyclin_ACdk2_complexification is "Cyclin A/Cdk2 complexification";
  Cyclin_A_degradation: Ca => ; V_da*Cdc20a*Ca*Compartment_0/((K_acdc20 + Cdc20a)*(K_da + Ca));  // modifiers: Cdc20a
  Cyclin_A_constitutive_degradation: Ca => ; Ca*Compartment_0*k_dda;
  inactivation_of_cyclin_ACdk2_a_through_phosphorylation_by_Wee1: Ma => Mai; V_m2a*Wee1*Ma*Compartment_0/(K_2a + Ma); inactivation_of_cyclin_ACdk2_a_through_phosphorylation_by_Wee1 is "inactivation of cyclin A/Cdk2 (a) through phosphorylation by Wee1";  // modifiers: Wee1
  inactivation_of_cyclin_ACdk2_a_through_phosphorylation_by_Myt1: Ma => Mai; V_m2a*Ma*Compartment_0*i_b2/(K_2a + Ma); inactivation_of_cyclin_ACdk2_a_through_phosphorylation_by_Myt1 is "inactivation of cyclin A/Cdk2 (a) through phosphorylation by Myt1";
  Activation_of_cyclin_ACdk2_i_through_dephosphorylation_by_phosphatase_Cdc25_Pa: Mai => Ma; V_m1a*Mai*Pa*Compartment_0/(K_1a + Mai); Activation_of_cyclin_ACdk2_i_through_dephosphorylation_by_phosphatase_Cdc25_Pa is "Activation of cyclin A/Cdk2 (i) through dephosphorylation by phosphatase Cdc25 (Pa)";  // modifiers: Pa
  Cyclin_ACdk2__p27_complexification: Ma + p27 -> Map27; Compartment_0*(k_c5*Ma*p27 + (-(k_c6*Map27))); Cyclin_ACdk2__p27_complexification is "Cyclin A/Cdk2 / p27 complexification";
  Synthesis_of_p27: => p27; Compartment_0*v_s1p27;
  Synthesis_of_p27_induced_by_E2F: => p27; K_i14/(K_i14 + pRBp)*(K_i13/(K_i13 + pRB))*E2F*Compartment_0*v_s2p27;  // modifiers: E2F, pRB, pRBp
  Inactivation_of_p27_through_phosphorylation_by_cyclin_ECdk2: p27 => p27p; V_1p27*p27*Me*Compartment_0/(K_1p27 + p27); Inactivation_of_p27_through_phosphorylation_by_cyclin_ECdk2 is "Inactivation of p27 through phosphorylation by cyclin E/Cdk2";  // modifiers: Me
  Activation_of_p27p_through_dephosphorylation: p27p => p27; V_2p27*p27p*Compartment_0/(K_2p27 + p27p);
  Non_specific_p27_degradation: p27 => ; p27*Compartment_0*k_ddp27; Non_specific_p27_degradation is "Non-specific p27 degradation";
  p27p_degradation: p27p => ; V_dp27p*Skp2*p27p*Compartment_0/((K_dp27p + p27p)*(K_dp27skp2 + Skp2));  // modifiers: Skp2
  non_specific_p27p_degradation: p27p => ; p27p*Compartment_0*k_ddp27p; non_specific_p27p_degradation is "non-specific p27p degradation";
  Inactivation_of_Cdh1_a_through_phosphorylation_by_cyclin_ACdk2: Cdh1a => Cdh1i; V_2cdh1*Ma*Cdh1a*Compartment_0/(K_2cdh1 + Cdh1a); Inactivation_of_Cdh1_a_through_phosphorylation_by_cyclin_ACdk2 is "Inactivation of Cdh1 (a) through phosphorylation by cyclin A/Cdk2";  // modifiers: Ma
  Inactivation_of_Cdh1_a_through_phosphorylation_by_cyclin_BCdk1: Cdh1a => Cdh1i; V_2cdh1*Mb*Cdh1a*Compartment_0/(K_2cdh1 + Cdh1a); Inactivation_of_Cdh1_a_through_phosphorylation_by_cyclin_BCdk1 is "Inactivation of Cdh1 (a) through phosphorylation by cyclin B/Cdk1";  // modifiers: Mb
  Activation_rate_of_Cdh1_i_through_dephosphorylation: Cdh1i => Cdh1a; V_1cdh1*Cdh1i*Compartment_0/(K_1cdh1 + Cdh1i); Activation_rate_of_Cdh1_i_through_dephosphorylation is "Activation rate of Cdh1 (i) through dephosphorylation";
  Degradation_of_inactive_Cdh1: Cdh1i => ; Cdh1i*Compartment_0*k_dcdh1i;
  Synthesis_of_active_Cdh1: => Cdh1a; Compartment_0*v_scdh1a;
  Degradation_of_active_Cdh1: Cdh1a => ; Cdh1a*Compartment_0*k_dcdh1a;
  Synthesis_of_phosphatase_Cdc25_Pai_acting_on_cyclin_ACdk2: => Pai; Compartment_0*v_spai; Synthesis_of_phosphatase_Cdc25_Pai_acting_on_cyclin_ACdk2 is "Synthesis of phosphatase Cdc25 (Pai) acting on cyclin A/Cdk2";
  Degradation_of_inactive_phosphatase_Cdc25_Pai: Pai => ; Pai*Compartment_0*k_dpai; Degradation_of_inactive_phosphatase_Cdc25_Pai is "Degradation of inactive phosphatase Cdc25 (Pai)";
  Phosphatase_Cdc25_Pa_Chk1_independent_inactivation: Pa => Pai; V_6a*Pa*Compartment_0*x_a1/(K_6a + Pa); Phosphatase_Cdc25_Pa_Chk1_independent_inactivation is "Phosphatase Cdc25 (Pa) Chk1-independent inactivation";
  Chk1_dependent_inactivation_of_phosphatase_Cdc25_Pa: Pa => Pai; V_6a*Pa*Chk1*Compartment_0*x_a2/(K_6a + Pa); Chk1_dependent_inactivation_of_phosphatase_Cdc25_Pa is "Chk1-dependent inactivation of phosphatase Cdc25 (Pa)";  // modifiers: Chk1
  Activation_of_phosphatase_Cdc25_Pai_through_phosphorylation_by_cyclin_ACdk2: Pai => Pa; V_m5a*Pai*Ma*Compartment_0/(K_5a + Pai); Activation_of_phosphatase_Cdc25_Pai_through_phosphorylation_by_cyclin_ACdk2 is "Activation of phosphatase Cdc25 (Pai) through phosphorylation by cyclin A/Cdk2";  // modifiers: Ma
  activation_of_phosphatase_Cdc25_Pai_through_phosphorylation_by_kinase_Plk3: Pai => Pa; V_m5a*Pai*a_a*Compartment_0/(K_5a + Pai); activation_of_phosphatase_Cdc25_Pai_through_phosphorylation_by_kinase_Plk3 is "activation of phosphatase Cdc25 (Pai) through phosphorylation by kinase Plk3";
  Constitutive_degradation_of_Cyclin_ACdk2: Pa => ; Pa*Compartment_0*k_dpa; Constitutive_degradation_of_Cyclin_ACdk2 is "Constitutive degradation of Cyclin A/Cdk2";
  Synthesis_of_cyclin_B: => Cb; Compartment_0*v_cb;
  Cyclin_BCdk1_complexification: Cb + cdk1 -> Mbi; Compartment_0*(k_com4*Cb*cdk1 + (-(k_decom4*Mbi))); Cyclin_BCdk1_complexification is "Cyclin B/Cdk1 complexification";
  cyclin_B_degradation_by_Cdc20a: Cb => ; V_db*Cdc20a*Cb*Compartment_0/((K_db + Cb)*(K_dbcdc20 + Cdc20a));  // modifiers: Cdc20a
  cyclin_B_degradation_by_Cdh1a: Cb => ; V_db*Cdh1a*Cb*Compartment_0/((K_db + Cb)*(K_dbcdh1 + Cdh1a));  // modifiers: Cdh1a
  Cyclin_B_constitutive_degradation: Cb => ; Cb*Compartment_0*k_ddb;
  inactivation_of_cyclin_BCdk1_a_through_phosphorylation_by_kinase_Wee1: Mb => Mbi; V_m2b*Wee1*Mb*Compartment_0/(K_2b + Mb); inactivation_of_cyclin_BCdk1_a_through_phosphorylation_by_kinase_Wee1 is "inactivation of cyclin B/Cdk1 (a) through phosphorylation by kinase Wee1";  // modifiers: Wee1
  inactivation_of_cyclin_BCdk1_a_through_phosphorylation_by_kinase_Myt1: Mb => Mbi; V_m2b*Mb*Compartment_0*i_b3/(K_2b + Mb); inactivation_of_cyclin_BCdk1_a_through_phosphorylation_by_kinase_Myt1 is "inactivation of cyclin B/Cdk1 (a) through phosphorylation by kinase Myt1";
  activation_of_cyclin_BCdk1_i_through_dephosphorylation_by_phosphatase_Cdc25_Pb: Mbi => Mb; V_m1b*Mbi*Pb*Compartment_0/(K_1b + Mbi); activation_of_cyclin_BCdk1_i_through_dephosphorylation_by_phosphatase_Cdc25_Pb is "activation of cyclin B/Cdk1 (i) through dephosphorylation by phosphatase Cdc25 (Pb)";  // modifiers: Pb
  binding_of_cyclin_BCdk1_a_to_p27: Mb + p27 -> Mbp27; Compartment_0*(-Mbp27*k_c8 + k_c7*p27*Mb); binding_of_cyclin_BCdk1_a_to_p27 is "binding of cyclin B/Cdk1 (a) to p27";
  Synthesis_of_Cdc20_i: => Cdc20i; Compartment_0*v_scdc20i; Synthesis_of_Cdc20_i is "Synthesis of Cdc20 (i)";
  Activation_of_Cdc20_i_through_phosphorylation_by_cyclin_BCdk1: Cdc20i => Cdc20a; V_m3b*Cdc20i*Mb*Compartment_0/(K_3b + Cdc20i); Activation_of_Cdc20_i_through_phosphorylation_by_cyclin_BCdk1 is "Activation of Cdc20 (i) through phosphorylation by cyclin B/Cdk1";  // modifiers: Mb
  Cdc20_a_inactivation_through_dephosphorylation: Cdc20a => Cdc20i; V_m4b*Cdc20a*Compartment_0/(K_4b + Cdc20a); Cdc20_a_inactivation_through_dephosphorylation is "Cdc20 (a) inactivation through dephosphorylation";
  Degradation_of_inactive_Cdc20: Cdc20i => ; Cdc20i*Compartment_0*k_dcdc20i;
  Degradation_of_active_Cdc20: Cdc20a => ; Cdc20a*Compartment_0*k_dcdc20a;
  Synthesis_of_phosphatase_Cdc25_Pbi_acting_on_cyclin_BCdk1: => Pbi; Compartment_0*v_spbi; Synthesis_of_phosphatase_Cdc25_Pbi_acting_on_cyclin_BCdk1 is "Synthesis of phosphatase Cdc25 (Pbi) acting on cyclin B/Cdk1";
  Chk1_dependent_inactivation_of_phosphatase_Cdc25_Pb: Pb => Pbi; V_6b*Pb*Chk1*Compartment_0*x_b2/(K_6b + Pb); Chk1_dependent_inactivation_of_phosphatase_Cdc25_Pb is "Chk1-dependent inactivation of phosphatase Cdc25 (Pb)";  // modifiers: Chk1
  Chk1_independent_inactivation_of_phosphatase_Cdc25_Pb: Pb => Pbi; V_6b*Pb*Compartment_0*x_b1/(K_6b + Pb); Chk1_independent_inactivation_of_phosphatase_Cdc25_Pb is "Chk1-independent inactivation of phosphatase Cdc25 (Pb)";
  Activation_of_phosphatase_Cdc25_Pbi_through_phosphorylation_by_cyclin_BCdk1: Pbi => Pb; V_m5b*Pbi*Mb*Compartment_0/(K_5b + Pbi); Activation_of_phosphatase_Cdc25_Pbi_through_phosphorylation_by_cyclin_BCdk1 is "Activation of phosphatase Cdc25 (Pbi) through phosphorylation by cyclin B/Cdk1";  // modifiers: Mb
  Activation_of_phosphatase_Cdc25_Pbi_through_phosphorylation_by_kinase_Plk1: Pbi => Pb; V_m5b*Pbi*a_b*Compartment_0/(K_5b + Pbi); Activation_of_phosphatase_Cdc25_Pbi_through_phosphorylation_by_kinase_Plk1 is "Activation of phosphatase Cdc25 (Pbi) through phosphorylation by kinase Plk1";
  Degradation_of_inactive_phosphatase_Cdc25_Pbi: Pbi => ; Pbi*Compartment_0*k_dpbi; Degradation_of_inactive_phosphatase_Cdc25_Pbi is "Degradation of inactive phosphatase Cdc25 (Pbi)";
  Degradation_of_active_phosphatase_Cdc25_Pb: Pb => ; Pb*Compartment_0*k_dpb; Degradation_of_active_phosphatase_Cdc25_Pb is "Degradation of active phosphatase Cdc25 (Pb)";
  Synthesis_of_kinase_Wee1: => Wee1; Compartment_0*v_swee1;
  inactivation_of_kinase_Wee1_through_phosphorylation_by_cyclin_BCdk1: Wee1 => Wee1p; V_m7b*Wee1*Mb*Compartment_0/(K_7b + Wee1); inactivation_of_kinase_Wee1_through_phosphorylation_by_cyclin_BCdk1 is "inactivation of kinase Wee1 through phosphorylation by cyclin B/Cdk1";  // modifiers: Mb
  Rate_constant_for_inactivation_of_kinase_Wee1_through_phosphorylation_by_kinase_Plk1: Wee1 => Wee1p; V_m7b*Wee1*Compartment_0*i_b/(K_7b + Wee1);
  Kinase_Wee1_activation_through_dephosphorylation: Wee1p => Wee1; V_m8b*Wee1p*Compartment_0/(K_8b + Wee1p);
  Degradation_of_active_kinase_Wee1: Wee1 => ; Wee1*Compartment_0*k_dwee1;
  Degradation_of_inactive_kinase_Wee1: Wee1p => ; Wee1p*Compartment_0*k_dwee1p;

  // Unit definitions:
  unit per_micromolar = litre / (1e-6 mole);
  unit nanomolar = 1e-9 mole / litre;
  unit hour = 3600 second;
  unit micromolar = 1e-6 mole / litre;
  unit micromolar_per_hour = 1e-6 mole / (litre * 3600 second); micromolar_per_hour is "micromolar/hour";
  unit nanomolar_per_hour = 1e-9 mole / (10 litre * 36000 second); nanomolar_per_hour is "nanomolar/hour";
  unit nanomoles = 1e-9 mole;
  unit micromoles = 1e-6 mole;
  unit dimension_less = dimensionless; dimension_less is "Dimensionless";
  unit per_hour = 1 / (3600 second);
  unit per_micromolar_per_hour = litre / (1e-6 mole * 3600 second);
  unit L = litre; L is "Litre";
  unit umol_per_hour = 1e-6 mole / (3600 second); umol_per_hour is "Micromoles per hour";
end
