// SBML level 3 version 1

model model_0()
  // Ras core
  // model units - substance: nmol, time: s, extent: nmol

  // Compartments:
  compartment cell = 1 L;

  // Species:
  species sos in cell = 200; sos is "SOS";
  species ras_gdp in cell = 11.8888; ras_gdp is "Ras-GDP";
  species ras_gtp in cell = 988.1112; ras_gtp is "Ras-GTP";
  species sos_ras_gdp in cell = 0; sos_ras_gdp is "SOS-Ras-GDP";
  species sos_ras_gtp in cell = 0; sos_ras_gtp is "SOS-Ras-GTP";
  species gap in cell = 125; gap is "GAP";
  species total_sos in cell = 3000; total_sos is "Total SOS";
  species total_ras in cell = 7500; total_ras is "Total Ras";

  // Parameters:
  k1 = 0.00018 per_nmol_per_liter_per_seconds; k1 is "SOS-Ras-GDP complexification constant";
  d1 = 3 s_1; d1 is "SOS-Ras-GDP decomplexification constant";
  k4cat = 0.003 s_1; k4cat is "Ras activation by SOS-Ras-GDP catalytic constant";
  k4m = 9120 nmol_per_liter; k4m is "Ras activation by SOS-Ras-GDP michaelis constant";
  kcat3 = 2 s_1; kcat3 is "Ras activation by SOS-Ras-GTP catalytic constant";
  k3m = 1640 nmol_per_liter; k3m is "Ras activation by SOS-Ras-GTP michaelis constant";
  k5cat = 0.1 s_1; k5cat is "Ras inactivation by GAP catalytic constant";
  k5m = 107 nmol_per_liter; k5m is "Ras inactivation by GAP michaelis constant";
  k2 = 0.00017 per_nmol_per_liter_per_seconds; k2 is "SOS-Ras-GTP complexification constant";
  d2 = 0.4 s_1; d2 is "SOS-Ras-GTP decomplexification constant";

  // Reactions:
  SOS_Ras_GDP_Complexification: sos + ras_gdp -> sos_ras_gdp; cell*(-1*sos_ras_gdp*d1 + ras_gdp*sos*k1); SOS_Ras_GDP_Complexification is "SOS-Ras-GDP Complexification";
  SOS_Ras_GTP_Complexification: sos + ras_gtp -> sos_ras_gtp; cell*(-1*sos_ras_gtp*d2 + ras_gtp*sos*k2); SOS_Ras_GTP_Complexification is "SOS-Ras-GTP Complexification";
  Ras_activation_by_SOS_Ras_GDP: ras_gdp => ras_gtp; ras_gdp*sos_ras_gdp*cell*k4cat/(ras_gdp + k4m); Ras_activation_by_SOS_Ras_GDP is "Ras activation by SOS-Ras-GDP";  // modifiers: sos_ras_gdp
  Ras_activation_by_SOS_Ras_GTP: ras_gdp => ras_gtp; ras_gdp*sos_ras_gtp*cell*kcat3/(ras_gdp + k3m); Ras_activation_by_SOS_Ras_GTP is "Ras activation by SOS-Ras-GTP";  // modifiers: sos_ras_gtp
  Ras_inactivation_by_GAP: ras_gtp => ras_gdp; gap*ras_gtp*cell*k5cat/(ras_gtp + k5m);  // modifiers: gap

  // Unit definitions:
  unit L = 10 litre; L is "Litre";
  unit nmol = 1e-9 mole; nmol is "Nanomoles";
  unit nmol_per_liter = 1e-9 mole / (10 litre); nmol_per_liter is "Nanomoles per litre";
  unit s = 10 second; s is "Seconds";
  unit s_1 = 1 / (10 second); s_1 is "per Seconds";
  unit nmol_1 = 1 / (1e-9 mole); nmol_1 is "per Nanomoles";
  unit dim_less = 10 dimensionless; dim_less is "Dimensionless";
  unit per_nmol_per_seconds = 1 / (1e-9 mole * 10 second); per_nmol_per_seconds is "per Nanomoles per Seconds";
  unit mnol_per_seconds = 1e-9 mole / (10 second); mnol_per_seconds is "Nanomoles per seconds";
  unit nmol_per_liter_per_seconds = 1e-9 mole / (10 litre * 10 second); nmol_per_liter_per_seconds is "Nanomoles per litre per seconds";
  unit per_nmol_per_liter_per_seconds = 10 litre / (1e-9 mole * 10 second); per_nmol_per_liter_per_seconds is "per Nanomoles per liter per Seconds";
end
